# 3D Simulation of Shearing an Ice Floe
# By Lexi Arlen September 2024

# Shearing applied in the x-direction


### ----------------------------------- variable declaration ----------------------------------- ###

# Material Properties
variable diameter                equal 1.0        # [m] particles diameter
variable ice_density             equal 910.0      # [kg/m3] 3D density
variable elastic_modulus         equal 1.0e8      # [Pa]
variable poissons_ratio          equal 0.3        # [-]
variable polydispersity          equal 0.02       # [-] percent polydispersity to apply

# Output Parameters
variable fileprint_time          equal 0.005    # [s] how often we print to the file

# Derived Material Properties
variable radius                  equal 0.5*${diameter}
variable radius_squared          equal ${radius}*${radius}
variable shear_modulus           equal ${elastic_modulus}/(2.0*(1.0+${poissons_ratio})) # assume isotropy
variable bond_skin               equal 1.05*${diameter} # can't be too large

# Forcing Parameters
variable coeff_drag_ocean        equal 0.006      # [-] drag coeff between ice & ocean
variable coeff_drag_atmos        equal 0.001      # [-] drag coeff between ice & atmosphere
variable seawater_density        equal 1020       # [kg/m3] density of seawater
variable atmos_density           equal 1          # [kg/m3] density of air
variable max_wind_speed          equal 20         # [m/s] maximum wind speed
variable jet_width               equal 10         # [m] width of the jet

# Forcing
variable ocean_forcing_coeff     equal ${seawater_density}*${coeff_drag_ocean}*PI*${radius_squared}*${ice_density}/${seawater_density}
#variable atmos_forcing_coeff     equal ${atmos_density}*${coeff_drag_atmos}*PI*${radius_squared}*(${seawater_density}-${ice_density})/${seawater_density}

#variable u_atmos_x               equal 0
#variable u_atmos_y               atom "v_max_wind_speed*exp(-y^2/(2*v_jet_width*v_jet_width))"
variable u_ocean_x               atom "0.0"
#variable u_ocean_y               equal 0

# variable Fdrag_atmos_x           atom v_atmos_forcing_coeff*abs(v_u_atmos_x)*v_u_atmos_x
# variable Fdrag_atmos_y           atom v_atmos_forcing_coeff*abs(v_u_atmos_y)*v_u_atmos_y
# variable Fdrag_atmos_z           atom 0
variable Fdrag_ocean_x           atom ${ocean_forcing_coeff}*abs(vx)*(v_u_ocean_x-vx)#${ocean_forcing_coeff}*abs(v_u_ocean_x-vx)*(v_u_ocean_x-vx)
# variable Fdrag_ocean_y           atom v_ocean_forcing_coeff*abs(v_u_ocean_y-vy)*(v_u_ocean_y-vy)
# variable Fdrag_ocean_z           atom 0

# Calculate dt using the bond model
variable dt                      equal 2e-5

# Simulation Derived Parameters
variable lattice_spacing         equal ${diameter}*(1+${polydispersity})
variable fileprint_step          equal ceil(${fileprint_time}/${dt})

### ----------------------------------- build simulation ----------------------------------- ###

# Preliminaries
units si                                                                # SI units
atom_style granular
atom_modify map array sort 0 0
newton off                                                              # don't use Newton's 3rd law

processors * * *                        # 1 processor per axis; if using multiple processors, use '*'
communicate single vel yes              # ghost particles are given position and velocity information
neighbor 1.0 bin                        # skin distance to specify bin size for neighbor list generation
neigh_modify delay 0                    # don't delay the generation of neighbor lists

# Domain
boundary p f p                                                           # periodic boundary conditions in x y z
region domain block 0.0 25.0 0.0 50.0 -2.0 2.0 units box         # (min X, max X, min Y, max Y, min Z, max Z)
create_box 1 domain                                                      # create box with domain above and 1 particle type
region insertion_region block 0.5 24.5 0.5 24.5 -0.6 0.6 units box     # (min X, max X, min Y, max Y, min Z, max Z)

# Contact style
pair_style gran model hertz tangential history                           # Hertz-Mindlin
pair_coeff * *                                                           # contact coeffs from material props not force field

# Create and insert atoms
fix m1 all property/global youngsModulus peratomtype ${elastic_modulus}  # set the elastic modulus
fix m2 all property/global poissonsRatio peratomtype ${poissons_ratio}   # set Poisson's ratio
fix m3 all property/global coefficientRestitution peratomtypepair 1 0.2  # set restituion coefficient to atom type 1
fix m4 all property/global coefficientFriction peratomtypepair 1 0.7     # set friction coefficient to atom type 1


lattice hcp ${lattice_spacing}
create_atoms 1 region insertion_region units lattice                     # atom type, region for attoms to be created,
set type 1 diameter ${diameter} density ${ice_density}     # assign all atoms w/ initial values

timestep ${dt}                                                           # timestep
run 0                                                                    # insert particles


### ----------------------------------- apply forces ---------------------------------- ###

fix ocean_drag all addforce v_Fdrag_ocean_x 0.0 0.0 #${Fdrag_ocean_y}  ${Fdrag_ocean_z}
# fix atmos_drag all addforce vector v_Fdrag_atmos_x v_Fdrag_atmos_y v_Fdrag_atmos_z

### ----------------------------------- run & output simulation ---------------------------------- ###

shell mkdir post

fix integrate all nve/sphere                            # set the integrator such that moles, velocity, and energy are conserved
compute stress all stress/atom pair

dump dmp all custom 10 post/dump*.liggghts id mass x y z vx vy vz fx fy fz radius c_stress[1] c_stress[2] c_stress[3] c_stress[4] c_stress[5] c_stress[6]
dump_modify dmp pad 10 sort id first yes                             # pad the timesteps with zeros

thermo 500                                             # set output frequency for output for screen
thermo_style custom step numbonds atoms time dt                  # custom pringting to screen
thermo_modify lost warn norm no                       # ignore lost atoms and do not normalize output

run 30
