# Random packing for floe creation
# By Lexi Arlen October 2024

### ----------------------------------- output configuration ----------------------------------- ###
shell mkdir post2d                                      # make directory to output data
log post2d/log.log

### ----------------------------------- variable declaration ----------------------------------- ###

# Material Properties
variable diameter                equal 1.0        # [m] particles diameter
variable density                 equal 910.0      # [kg/m3] 3D particle density
variable elastic_modulus         equal 1.0e8      # [Pa]
variable poissons_ratio          equal 0.3        # [-]
variable friction_ini            equal 0.5       # [-]
variable friction                equal 0.7        # [-]
variable restitution_ini         equal 0.2        # [-]
variable restitution             equal 0.2        # [-]

# Simulation Parameters
variable fileprint_time          equal 0.005    # [s] how often we print to the file
#variable dt                      equal 0.001    # [s] timestep


variable Lx1                     equal -50.0    # [m] minimum x domain boundary
variable Lx2                     equal 100.0    # [m] maximum x domain boundary
variable Ly1                     equal -50.0    # [m] minimum y domain boundary
variable Ly2                     equal 100.0    # [m] maximum y domain boundary
variable Lz1                     equal -1.0     # [m] minimum z domain boundary
variable Lz2                     equal 2.0      # [m] maximum z domain boundary
variable minx                    equal 0.0      # [m] minimum x domain boundary
variable maxx                    equal 50.0     # [m] maximum x domain boundary
variable miny                    equal 0.0      # [m] minimum y domain boundary
variable maxy                    equal 50.0     # [m] maximum y domain boundary
variable minz                    equal 0.0      # [m] minimum z domain boundary
variable maxz                    equal 1.0      # [m] maximum z domain boundary
variable sic                     equal 0.78     # [-] packing density

# Derived Material Properties
variable radius                  equal 0.5*${diameter}
variable shear_modulus           equal ${elastic_modulus}/(2.0*(1.0+${poissons_ratio})) # assume isotropy
variable 2d_mass                 equal ${density}*PI*${radius}^2*1

# Derived Simulation Properties
variable lattice_spacing         equal ${radius}*sqrt(PI/${sic})
variable dt                      equal 1e-5

### ----------------------------------- build simulation ----------------------------------- ###

# Preliminaries
units si                                # SI units
atom_style granular                     # specify particle style
#atom_modify	map array sort 0 0
dimension 2
#hard_particles yes                      # need for high elastic modulus (> 1e5)
newton off                              # don't use Newton's 3rd law

processors * * *                        # 1 processor per axis; if using multiple processors, use '*'
communicate single vel yes              # ghost particles are given position and velocity information
neighbor 0.01 bin                        # skin distance to specify bin size for neighbor list generation
neigh_modify delay 0                    # don't delay the generation of neighbor lists

# Domain
boundary m m p                                               # periodic boundaries in z (required for 2d); minimum shrink wrapping in x y
region domain block ${Lx1} ${Lx2} ${Ly1} ${Ly2} ${Lz1} ${Lz2} units box     # (min X, max X, min Y, max Y, min Z, max Z)
create_box 1 domain                                          # create box with domain above and 1 particle type

# Contact style
pair_style gran model hertz tangential history                           # Hertz-Mindlin
pair_coeff * *                                                           # contact coeffs from material props not force field

# Specify contact properties
fix m1 all property/global youngsModulus peratomtype ${elastic_modulus}                  # set the elastic modulus
fix m2 all property/global poissonsRatio peratomtype ${poissons_ratio}                   # set Poisson's ratio
fix m3 all property/global coefficientRestitution peratomtypepair 1 ${restitution_ini}    # set restituion coefficient to atom type 1
fix m4 all property/global coefficientFriction peratomtypepair 1 ${friction_ini}         # set friction coefficient to atom type 1

# Add walls
fix xwalls1 all wall/gran model hertz tangential history primitive type 1 xplane ${minx}
fix xwalls2 all wall/gran model hertz tangential history primitive type 1 xplane ${maxx}
fix ywalls1 all wall/gran model hertz tangential history primitive type 1 yplane ${miny}
fix ywalls2 all wall/gran model hertz tangential history primitive type 1 yplane ${maxy}
#fix zwalls1 all wall/gran model hertz tangential history primitive type 1 zplane 0.0
#fix zwalls2 all wall/gran model hertz tangential history primitive type 1 zplane 10.0

# Particle Insertion
region insertion_region block ${minx} ${maxx} ${miny} ${maxy} ${minz} ${maxz} units box     # (min X, max X, min Y, max Y, min Z, max Z)
lattice sq ${lattice_spacing}
create_atoms 1 region insertion_region units lattice                     # atom type, region for attoms to be created
group all_atoms type 1
set group all_atoms diameter ${diameter} density ${density}    		   # assign all atoms w/ initial values
run 0

timestep ${dt}

### ------------------------------------- output parameters ------------------------------------------ ###

fix 2d all enforce2d                                    # ensures no motion in z-direction
fix integrate all nve/sphere                            # set the integrator such that moles, velocity, and energy are conserved
compute stress all stress/atom pair

dump dmp all custom 50000 post2d/dump*.liggghts id mass x y z vx vy vz fx fy fz radius c_stress[1] c_stress[2] c_stress[3] c_stress[4] c_stress[5] c_stress[6]
dump_modify dmp pad 10                                  # pad the timesteps with zeros

thermo 50000                                             # set output frequency for output for screen
thermo_style custom step atoms time dt                  # custom pringting to screen
thermo_modify lost ignore norm no                       # ignore lost atoms and do not normalize output

### ------------------------------------- redistribute particles ------------------------------------------ ###

# # Apply 10% polydispersity
variable	num_grains equal count(all_atoms)
label		loop_through_each_grain
variable	iter loop ${num_grains}
   variable	modifiedDiameter equal ${diameter}*(random(-1,1,93263)*0.2+1)
   set	 	atom ${iter} diameter ${modifiedDiameter}
next		iter
jump		SELF loop_through_each_grain
run 1

# # Apply gravity
fix grav_negy all gravity 9.8 vector 0.0 -1.0 0.0

variable iter loop 4
label loop_start
run 200000
    velocity all set 0.0 0.0 0.0
    next iter
jump SELF loop_start


# Reapply monodispersity
# implement 0% polydispersity by randomly assigning new diameters looping through each grain
label		loop_through_each_grain2
variable	iter loop ${num_grains}
   set	 	atom ${iter} diameter ${diameter}
next		iter
jump		SELF loop_through_each_grain2

variable iter loop 2
label loop_start2
run 100000
    velocity all set 0.0 0.0 0.0
    next iter
jump SELF loop_start2

run 200000

write_restart grains2d.restart
