# Material Properties
variable true_max_diameter       equal 0.015       # [m] max particle diameter
variable bond_damp_type          equal 1          # [-] Use Yu Guo Damping
variable bond_damp_val           equal 0.0        # [-] don't use bond damping
variable rho_i                   equal 920.0      # [kg/m3] ice density
variable elastic_modulus         equal 1.0e8      # [Pa]
variable poissons_ratio          equal 0.3        # [-]
variable normal_strength         equal 5.0e5      # [Pa] bond critical normal strength
variable shear_strength          equal 5.0e5      # [Pa] bond critical shear strength
variable coeff_rest_pp           equal 0.1        # [-] particle particle
variable friction_pp             equal 0.8        # [-] particle particle
variable coeff_rest_pw           equal 0.1        # [-] particle wall
variable friction_pw             equal 0.8        # [-] particle wall
variable coeff_rest_ww           equal 0.1        # [-] wall wall
variable friction_ww             equal 0.0        # [-] wall wall
variable poly                    equal 0.2        # [%] polydispersity

# Simulation Parameters
variable phi                     equal 0.35        # [-] packing fraction
variable l                       equal 0.4         # [m] sample height between "plates"; choose st than min_grain/L <= 2% - arbitrary, but need to a place to start

# Derived Properties & Parameters
variable bond_skin_thickness     equal 0.001*${true_max_diameter}    # [m] 0.5% of the max diameter; will subtract this quantity first when doing the packing fix
variable max_diameter            equal 0.015+${bond_skin_thickness}       # [m] max particle diameter for packing
variable min_diameter            equal 0.008+${bond_skin_thickness}       # [m] min particles diameter for packing; added 0.0001 for first step in shrinking
variable max_radius              equal ${max_diameter}/2 # particle max radius
variable shear_modulus           equal ${elastic_modulus}/(2.0*(1.0+${poissons_ratio})) # assume isotropy
variable sample_width            equal ${l}*0.5
variable column_height           equal ${l}*1-${max_radius}
variable column_height_ini       equal ${column_height}*12*${l}

# Parameters for collapse
variable coeff                  atom PI*(r^2)*${rho_i}
variable dragx                  atom v_coeff*sqrt((vx)^2+(vy)^2+(vz)^2)*(-1*vx)
variable dragy                  atom v_coeff*sqrt((vx)^2+(vy)^2+(vz)^2)*(-1*vy)
variable dragz                  atom 0.25*v_coeff*sqrt((vx)^2+(vy)^2+(vz)^2)*(-1*vz)

# Numerics & output
variable dt                      equal 1e-5                # really low to resolve high elastic modulus

### ----------------------------------- build simulation ----------------------------------- ###

# Preliminaries
units si
atom_style hybrid granular bond/gran n_bondtypes 1 bonds_per_atom 12
atom_modify map array sort 0 0
newton off
boundary m m m
hard_particles yes
processors * * *

# Domain
boundary f f f
region domain block -1 1 -1 1 -0.5 5 units box
create_box 2 domain
region ins_region block 0 ${sample_width} 0 ${sample_width} 0 ${column_height_ini}# cylinder centered at origin

communicate single vel yes              # ghost particles are given position and velocity information
neighbor 0.002 bin                        # skin distance to specify bin size for neighbor list generation
neigh_modify delay 0                    # don't delay the generation of neighbor lists

# Bond style
bond_style gran                                        # linear parallel bond

# Contact style
pair_style gran model hertz tangential history                           # Hertz-Mindlin
pair_coeff * *                                                           # contact coeffs from material props not force field

# Contact law
fix m1 all property/global youngsModulus peratomtype ${elastic_modulus} ${elastic_modulus} # set the elastic modulus
fix m2 all property/global poissonsRatio peratomtype ${poissons_ratio} ${poissons_ratio}  # set Poisson's ratio
fix m3 all property/global coefficientRestitution peratomtypepair 2 ${coeff_rest_pp} ${coeff_rest_pw} ${coeff_rest_pw} ${coeff_rest_ww}
fix m4 all property/global coefficientFriction peratomtypepair 2 ${friction_pp} ${friction_pw} ${friction_pw} ${friction_ww}

# Set bond coefficients for a simple bond (no holes) with properties below; see Notion for more details
bond_coeff 1 1 0 ${elastic_modulus} ${shear_modulus} ${bond_damp_type} ${bond_damp_val} 1 ${normal_strength} ${shear_strength}

# Insertion configuration
fix pts1 all particletemplate/sphere 49979687 atom_type 1 density constant ${rho_i} radius constant ${max_radius}
fix pdd1 all particledistribution/discrete 200237 1 pts1 1.0
fix ins all insert/pack seed 409709 distributiontemplate pdd1 insert_every once overlapcheck yes volumefraction_region ${phi} region ins_region

# Timestep & insertion
timestep ${dt}
run 1

# Implement {poly}% polydispersity by randomly assigning new diameters looping through each grain
group        all_atoms type 1
variable     num_grains equal count(all_atoms)

label        loop_through_each_grain
variable     iter loop ${num_grains}
  variable    randVal equal random(0,1,32452843)
  variable    diam equal v_min_diameter*(v_max_diameter/v_min_diameter)^v_randVal
  set         atom ${iter} diameter ${diam}

next         iter
jump         SELF loop_through_each_grain

# Relaxation setup
fix side1 all wall/gran model hertz tangential history primitive type 2 xplane 0
fix side2 all wall/gran model hertz tangential history primitive type 2 xplane ${sample_width}
fix side3 all wall/gran model hertz tangential history primitive type 2 yplane 0
fix side4 all wall/gran model hertz tangential history primitive type 2 yplane ${sample_width}
fix bot_wall all wall/gran model hertz tangential history primitive type 2 zplane 0
fix top_wall all wall/gran model hertz tangential history primitive type 2 zplane ${column_height_ini}

fix int all nve/sphere
fix gravi all gravity 10 vector 0 0 -1
fix fdrag all addforce v_dragx v_dragy 0 # added x-y drag to accelerate packing

# Dump setup
dump dmp all custom 16000 post/dump*.liggghts id x y z radius vz
dump_modify dmp pad 10 sort id first yes

thermo 20000                                             # set output frequency for output for screen
thermo_style custom step numbonds atoms time dt                 # custom pringting to screen
thermo_modify lost warn norm no                       # ignore lost atoms and do not normalize output

# run
run 150000

# delete atoms above z > cylinder height; need to subtract particle radii from desired cylinder height
region reg2delete block 0 ${sample_width} 0 ${sample_width} ${column_height} ${column_height_ini}
delete_atoms region reg2delete

fix another_wall all wall/gran model hertz tangential history primitive type 2 zplane ${column_height}
unfix gravi
fix zdrag all addforce 0 0 v_dragz # added x-y drag to accelerate packing
run 200000

write_data data/ji_mesh1.data
