# Material Properties
variable bond_damp_type          equal 1          # [-] Use Yu Guo Damping
variable bond_damp_val           equal 0.0        # [-] don't use bond damping
variable elastic_modulus         equal 1.0e8      # [Pa]
variable poissons_ratio          equal 0.3        # [-]
variable normal_strength         equal 5.0e5      # [Pa] bond critical normal strength
variable shear_strength          equal 1.0e6      # [Pa] bond critical shear strength
variable coeff_rest              equal 0.3        # [-] particle particle
variable mu                      equal 2.5        # [-] particle particle friction

# Simulation Parameters
variable l                       equal 0.4        # [m] sample height between "plates"
variable strain_rate             equal 7.5e-3       # [1/s]

# Derived Properties & Parameters
variable shear_modulus           equal ${elastic_modulus}/(2.0*(1.0+${poissons_ratio})) # assume isotropy
variable sample_width            equal ${l}*0.5
variable column_height           equal ${l}*1.5
variable bot_plate_height        equal ${l}*0.25
variable top_plate_height        equal ${l}*1.25
variable top_plate_sign          equal -1
variable top_plate_velocity      equal ${top_plate_sign}*${l}*${strain_rate}

# Numerics & output
variable dt                      equal 1e-5                # really low to resolve high elastic modulus
variable run_time                equal 4                   # [s] runtime
variable num_timesteps           equal floor(${run_time}/${dt})
variable dump_freq               equal 500
variable post_dir                string "post"

### ----------------------------------- build simulation ----------------------------------- ###


# Preliminaries
units si                                                                # SI units
atom_style hybrid granular bond/gran n_bondtypes 1 bonds_per_atom 12     # specify particle and bond style
atom_modify map array sort 0 0
newton off                                                              # don't use Newton's 3rd law
boundary f f f
hard_particles yes

processors 1 1 3                                                        # ligghts allocates processors for x,y,z '*'

read_restart restarts/sample.restart

communicate single vel yes              # ghost particles are given position and velocity information
neighbor  0.008 bin                      # needs to be larger than bond length
neigh_modify delay 0                    # don't delay the generation of neighbor lists

# Bond style
bond_style gran                                                          # linear parallel bond

# Contact style
pair_style gran model hertz tangential history                           # Hertz-Mindlin
pair_coeff * *                                                           # contact coeffs from material props not force field


# Contact law
fix m1 all property/global youngsModulus peratomtype ${elastic_modulus}  # set the elastic modulus
fix m2 all property/global poissonsRatio peratomtype ${poissons_ratio}   # set Poisson's ratio
fix m3 all property/global coefficientRestitution peratomtypepair 1 ${coeff_rest}
fix m4 all property/global coefficientFriction peratomtypepair 1 ${mu}     # set fric

# Set bond coefficients for a simple bond (no holes) with properties below; see Notion for more details
bond_coeff 1 1 0 ${elastic_modulus} ${shear_modulus} ${bond_damp_type} ${bond_damp_val} 1 ${normal_strength} ${shear_strength}

# Add walls to catch fallen particles
fix bot_wall all wall/gran model hertz tangential history primitive type 1 zplane 0
fix side1 all wall/gran model hertz tangential history primitive type 1 xplane -0.3
fix side2 all wall/gran model hertz tangential history primitive type 1 xplane 0.6
fix side3 all wall/gran model hertz tangential history primitive type 1 yplane -0.3
fix side4 all wall/gran model hertz tangential history primitive type 1 yplane 0.6

# Timestep & insertion
timestep ${dt}
run 0

# Groups
region top_region block 0 ${sample_width} 0 ${sample_width} ${top_plate_height} ${column_height}
group top_plate region top_region
region bot_region block 0 ${sample_width} 0 ${sample_width} 0 ${bot_plate_height}
group bot_plate region bot_region
group sample subtract all top_plate bot_plate

### ----------------------------------- computes ---------------------------------- ###

compute bcall all property/local batom1 batom2 bbondbroken

### ----------------------------------- apply forces ---------------------------------- ###

fix integrate sample nve/sphere
fix gravi sample gravity 9.81 vector 0.0 0.0 -1.0
fix bottom_plate_location bot_plate freeze
fix compressive_force top_plate move linear 0 0 ${top_plate_velocity}

### ----------------------------------- run & output ---------------------------------- ###

dump dmp_top_plate top_plate custom ${dump_freq} ${post_dir}/top_plate*.liggghts id x y z fz radius
dump_modify dmp_top_plate pad 10 sort id first yes

thermo 10000                                             # set output frequency for output for screen
thermo_style custom step numbonds atoms time dt               # custom pringting to screen
thermo_modify lost warn norm no                       # ignore lost atoms and do not normalize output

run ${num_timesteps}

# run one more step to save the final
dump bondforcechain all local 1 ${post_dir}/bfc_final*.bond c_bcall[1] c_bcall[2] c_bcall[3]
dump_modify bondforcechain pad 10 label 'BONDS'

dump dmp_all all custom 1 ${post_dir}/all_atoms*.liggghts id x y z radius
dump_modify dmp_all pad 10 sort id                              # pad the timesteps with zeros

run 1
