# Material Properties - all but diameter and density will be modified in postprocessing
variable true_mean_diameter      equal 1000         # [m] max particle diameter
variable bond_damp_type          equal 1          # [-] Use Yu Guo Damping
variable bond_damp_val           equal 0.0        # [-] don't use bond damping
variable rho_i                   equal 920.0      # [kg/m3] ice density
variable elastic_modulus         equal 1.0e8      # [Pa]
variable poissons_ratio          equal 0.3        # [-]
variable normal_strength         equal 5.0e5      # [Pa] bond critical normal strength
variable shear_strength          equal 5.0e5      # [Pa] bond critical shear strength
variable coeff_rest              equal 0.1        # [-] particle particle
variable mu                      equal 1.0        # [-] particle particle friction
variable wall_friction           equal 0.5        # [-] wall wall friction
variable poly                    equal 0.1        # [%] polydispersity
variable bs_multiplier           equal 0.001      # [-] bond skin multiplier

# Simulation Parameters
variable phi                     equal 0.6      # [-] initial packing fraction
variable fjord_length            equal 280e3     # [m] length of the fjord
variable max_fjord_width         equal 120e3     # [m] max width of the fjord
variable min_fjord_width         equal 40e3     # [m] min width of the fjord

# Derived Properties & Parameters
variable true_max_diameter       equal ${true_mean_diameter}*(1+${poly}) # [m] max particle diameter
variable true_min_diameter       equal ${true_mean_diameter}*(1-${poly}) # [m] min particle diameter
variable bond_skin_thickness     equal ${bs_multiplier}*${true_max_diameter}    # [m] 0.5% of the max diameter; will subtract this quantity first when doing the packing fix
variable max_diameter            equal ${true_max_diameter}+${bond_skin_thickness}       # [m] max particle diameter for packing
variable min_diameter            equal ${true_min_diameter}+${bond_skin_thickness}       # [m] min particles diameter for packing; added 0.0001 for first step in shrinking
variable max_radius              equal ${max_diameter}/2 # particle max radius
variable shear_modulus           equal ${elastic_modulus}/(2.0*(1.0+${poissons_ratio})) # assume isotropy
variable ins_region_height       equal ${fjord_length}/${phi}
variable ins_region_width        equal ${min_fjord_width}*2-1e3
variable ins_region_x            equal ${min_fjord_width}+1e3
variable maxy                    equal ${ins_region_height}+1e3# max y value for the fjord
variable minz                    equal -1*${max_diameter}/2
variable maxz                    equal ${max_diameter}/2

# Parameters for collapse
variable coeff                  atom PI*(r^2)*${rho_i}
variable dragx                  atom v_coeff*sqrt((vx)^2+(vy)^2+(vz)^2)*(-1*vx)
variable dragy                  atom v_coeff*sqrt((vx)^2+(vy)^2+(vz)^2)*(-1*vy)
variable dragz                  atom 100*v_coeff*sqrt((vx)^2+(vy)^2+(vz)^2)*(-1*vz)

# Numerics & output
variable dt                      equal 0.001

### ----------------------------------- build simulation ----------------------------------- ###

# Preliminaries
units si
atom_style hybrid granular bond/gran n_bondtypes 1 bonds_per_atom 12
atom_modify map array sort 0 0
newton off
hard_particles yes
processors * * *

# Domain
boundary m m m
region domain block -1 121e3 -10e3 ${maxy} -10.5e3 10.5e3 units box
create_box 2 domain
region ins_region block ${ins_region_x} ${ins_region_width} 5e3 ${ins_region_height} ${minz} ${maxz}# cylinder centered at origin

communicate single vel yes              # ghost particles are given position and velocity information
neighbor 450 bin                        # skin distance to specify bin size for neighbor list generation
neigh_modify delay 0                    # don't delay the generation of neighbor lists

# Bond style
bond_style gran                                        # linear parallel bond

# Contact style
pair_style gran model hertz tangential history                           # Hertz-Mindlin
pair_coeff * *                                                           # contact coeffs from material props not force field

# Contact law
fix m1 all property/global youngsModulus peratomtype ${elastic_modulus} ${elastic_modulus} # set the elastic modulus
fix m2 all property/global poissonsRatio peratomtype ${poissons_ratio} ${poissons_ratio}  # set Poisson's ratio
fix m3 all property/global coefficientRestitution peratomtypepair 2 ${coeff_rest} ${coeff_rest} ${coeff_rest} ${coeff_rest}
fix m4 all property/global coefficientFriction peratomtypepair 2 ${mu} ${wall_friction} ${wall_friction} ${wall_friction}     # set friction coefficient to atom type 1


# Set bond coefficients for a simple bond (no holes) with properties below; see Notion for more details
bond_coeff 1 1 0 ${elastic_modulus} ${shear_modulus} ${bond_damp_type} ${bond_damp_val} 1 ${normal_strength} ${shear_strength}


# # Insertion configuration
fix pts1 all particletemplate/sphere 49979687 atom_type 1 density constant ${rho_i} radius constant ${max_radius}
fix pdd1 all particledistribution/discrete 200237 1 pts1 1.0
fix ins all insert/pack seed 409709 distributiontemplate pdd1 insert_every once overlapcheck yes volumefraction_region ${phi} region ins_region

# Timestep & insertion
timestep ${dt}
run 0

# # Implement {poly}% polydispersity by randomly assigning new diameters looping through each grain
#group        all_atoms type 1
# variable     num_grains equal count(all_atoms)

# label		loop_through_each_grain
# variable	iter loop ${num_grains}
#    variable	modifiedDiameter equal random(v_min_diameter,v_max_diameter,3124127)
#    set	 	atom ${iter} diameter ${modifiedDiameter}
# next		iter
# jump		SELF loop_through_each_grain

# Insert walls to test narrow slot model

fix side_wall1 all wall/gran model hertz tangential history primitive type 2 xplane 0
fix side_wall2 all wall/gran model hertz tangential history primitive type 2 xplane ${max_fjord_width}
fix bot_wall all wall/gran model hertz tangential history primitive type 2 yplane 0
fix confine_top all wall/gran model hertz tangential history primitive type 2 zplane ${maxz}
fix confine_bot all wall/gran model hertz tangential history primitive type 2 zplane ${minz}

# timestep & integrator
fix int all nve/sphere
fix gravi all gravity 10 vector 0 -1 0
fix fdrag all addforce v_dragx v_dragy v_dragz # added x-y drag to accelerate packing

# Dump setup

thermo 5000                                             # set output frequency for output for screen
thermo_style custom step numbonds atoms time dt                 # custom pringting to screen
thermo_modify lost warn norm no                       # ignore lost atoms and do not normalize output

dump dmp all custom 100 post/dump*.liggghts id x y z radius vy
dump_modify dmp pad 10 sort id first yes


run 5000
