# Methodology: fill the bottom, then add rectangles at the top till full up to fjord height.

# Material Properties - all but diameter and density will be modified in postprocessing
variable true_mean_diameter      equal 1000         # [m] max particle diameter
variable bond_damp_type          equal 1          # [-] Use Yu Guo Damping
variable bond_damp_val           equal 0.0        # [-] don't use bond damping
variable rho_i                   equal 920.0      # [kg/m3] ice density
variable elastic_modulus         equal 1e9      # [Pa]
variable poissons_ratio          equal 0.3        # [-]
variable normal_strength         equal 5.0e5      # [Pa] bond critical normal strength
variable shear_strength          equal 5.0e5      # [Pa] bond critical shear strength
variable coeff_rest              equal 0.1        # [-] particle particle
variable mu                      equal 0.1        # [-] particle particle friction
variable wall_friction           equal 0.5        # [-] wall wall friction
variable poly                    equal 0.1        # [%] polydispersity
variable bs_multiplier           equal 0.001      # [-] bond skin multiplier

# Simulation Parameters
variable phi                     equal 0.6      # [-] initial packing fraction
variable lattice_spacing         equal ${true_mean_diameter}*1.5

# Domain
variable pad1                    equal 5e3
variable minx                    equal -10e3-${pad1}
variable maxx                    equal 130e3+${pad1}
variable miny                    equal -10e3-${pad1}
variable maxy                    equal 400e3+${pad1}
variable minz                    equal -550
variable maxz                    equal 10e3+${pad1}

# Derived Properties & Parameters
variable true_max_diameter       equal ${true_mean_diameter}*(1+${poly}) # [m] max particle diameter
variable true_min_diameter       equal ${true_mean_diameter}*(1-${poly}) # [m] min particle diameter
variable bond_skin_thickness     equal ${bs_multiplier}*${true_max_diameter}    # [m] 0.1% of the max diameter; will subtract this quantity first when doing the packing fix
variable max_diameter            equal ${true_max_diameter}+${bond_skin_thickness}       # [m] max particle diameter for packing
variable min_diameter            equal ${true_min_diameter}+${bond_skin_thickness}       # [m] min particles diameter for packing; added 0.0001 for first step in shrinking
variable mean_diameter           equal (${min_diameter}+${max_diameter})/2       # [m] mean particle diameter for packing; added 0.0001 for first step in shrinking
variable max_radius              equal ${max_diameter}/2 # particle max radius
variable shear_modulus           equal ${elastic_modulus}/(2.0*(1.0+${poissons_ratio})) # assume isotropy

# Particle insertion
variable pad2                    equal 0.5e3
variable ir1_xi                  equal 40e3+${pad2}
variable ir1_xf                  equal 80e3-${pad2}
variable ir1_yi                  equal 2.5e3
variable ir1_yf                  equal 240e3-${pad2}

variable ir_zi                  equal -0.25e3
variable ir_zf                  equal 0.25e3

# Parameters for collapse
variable coeff                  atom PI*(r^2)*${rho_i}
variable dragx                  atom v_coeff*sqrt((vx)^2+(vy)^2+(vz)^2)*(-1*vx)
variable dragy                  atom v_coeff*sqrt((vx)^2+(vy)^2+(vz)^2)*(-1*vy)
variable dragz                  atom v_coeff*sqrt((vx)^2+(vy)^2+(vz)^2)*(-1*vz)

# Numerics & output
variable dt                      equal 0.005

### ----------------------------------- build simulation ----------------------------------- ###

# Preliminaries
units si
atom_style hybrid granular bond/gran n_bondtypes 1 bonds_per_atom 6
atom_modify map array sort 0 0
newton off
hard_particles yes
processors * * *
boundary m m m

# Domain
read_data data/boundary_particles_1000m_tall.data

communicate single vel yes              # ghost particles are given position and velocity information
neighbor 450 bin                        # skin distance to specify bin size for neighbor list generation
neigh_modify delay 0                    # don't delay the generation of neighbor lists

# import the insertion region
region ins_reg0 block 3e3 117e3 0.5e3 1.5e3 ${ir_zi} ${ir_zf} units box
region ins_reg1_1 block ${ir1_xi} ${ir1_xf} ${ir1_yi} ${ir1_yf} ${ir_zi} ${ir_zf} units box
region ins_reg1_2 block 20e3 40e3 ${ir1_yi} 40e3 ${ir_zi} ${ir_zf} units box
region ins_reg1_3 block 80e3 100e3 ${ir1_yi} 40e3 ${ir_zi} ${ir_zf} units box
region ins_reg1 union 3 ins_reg1_1 ins_reg1_2 ins_reg1_3

# Bond style
bond_style gran                                        # linear parallel bond

# Contact style
pair_style gran model hertz tangential history                           # Hertz-Mindlin
pair_coeff * *                                                           # contact coeffs from material props not force field

# Contact law
fix m1 all property/global youngsModulus peratomtype ${elastic_modulus} ${elastic_modulus} # set the elastic modulus
fix m2 all property/global poissonsRatio peratomtype ${poissons_ratio} ${poissons_ratio}  # set Poisson's ratio
fix m3 all property/global coefficientRestitution peratomtypepair 2 ${coeff_rest} ${coeff_rest} ${coeff_rest} ${coeff_rest}
fix m4 all property/global coefficientFriction peratomtypepair 2 ${mu} ${wall_friction} ${wall_friction} ${wall_friction}     # set friction coefficient to atom type 1

# Set bond coefficients for a simple bond (no holes) with properties below; see Notion for more details
bond_coeff 1 1 0 ${elastic_modulus} ${shear_modulus} ${bond_damp_type} ${bond_damp_val} 1 ${normal_strength} ${shear_strength}

# Delete extra atoms
group extra_atoms type 1
delete_atoms group extra_atoms

# # Insertion configuration
lattice sc ${max_diameter}
create_atoms 1 region ins_reg0
timestep ${dt}
fix ts_check all check/timestep/gran 1000 0.2 0.2
run 1

fix pts1 all particletemplate/sphere 49979687 atom_type 1 density constant ${rho_i} radius constant ${max_radius} # i dont think this works at all
fix pdd1 all particledistribution/discrete 200237 1 pts1 1.0
fix ins all insert/pack seed 409709 distributiontemplate pdd1 insert_every once overlapcheck yes volumefraction_region ${phi} region ins_reg1

run 1
set type 1 diameter ${max_diameter} density ${rho_i}
# # Timestep & insertion

#Implement {poly}% polydispersity by randomly assigning new diameters looping through each grain; this only applies to bottom grains?
group        all_atoms type 1
variable     num_grains equal count(all_atoms)

label		loop_through_each_grain
variable	iter loop ${num_grains}
   variable	modifiedDiameter equal random(v_min_diameter,v_max_diameter,3124127)
   set	 	atom ${iter} diameter ${modifiedDiameter}
next		iter
jump		SELF loop_through_each_grain

set type 1 density ${rho_i}

fix confine_bot all wall/gran model hertz tangential history primitive type 2 zplane ${minz}

group active type 1

fix int active nve/sphere
fix gravi_z all gravity 10 vector 0 0 -5
fix fdrag all addforce v_dragx v_dragy v_dragz # added x-y drag to accelerate packing


# Dump setup

thermo 500000                                             # set output frequency for output for screen
thermo_style custom step numbonds atoms time dt                 # custom pringting to screen
thermo_modify lost warn norm no                       # ignore lost atoms and do not normalize output


dump dmp all custom 20000 post/dump*.liggghts id x y z radius vx vy vz
dump_modify dmp pad 10 sort id first yes

run 40000

unfix gravi_z
#fix int active nve/sphere
fix gravi_yz all gravity 10 vector 0 -1 -10 # prevent ridging
fix confine_top all wall/gran model hertz tangential history primitive type 2 zplane -2.8e3

run 1600000

write_restart restarts/packing_attempt1.restart
