# Methodology: fill the bottom, then add rectangles at the top till full up to fjord height.

# Material Properties - all but diameter and density will be modified in postprocessing
variable true_mean_diameter      equal 2000         # [m] max particle diameter
variable bond_damp_type          equal 1          # [-] Use Yu Guo Damping
variable bond_damp_val           equal 0.0        # [-] don't use bond damping
variable rho_i                   equal 920.0      # [kg/m3] ice density
variable elastic_modulus         equal 1e8      # [Pa]
variable poissons_ratio          equal 0.3        # [-]
variable normal_strength         equal 5.0e5      # [Pa] bond critical normal strength
variable shear_strength          equal 5.0e5      # [Pa] bond critical shear strength
variable coeff_rest              equal 0.1        # [-] particle particle
variable mu                      equal 1.0        # [-] particle particle friction
variable wall_friction           equal 0.5        # [-] wall wall friction
variable poly                    equal 0.1        # [%] polydispersity
variable bs_multiplier           equal 0.001      # [-] bond skin multiplier

# Simulation Parameters
variable phi                     equal 0.6      # [-] initial packing fraction
variable lattice_spacing         equal ${true_mean_diameter}

# Domain
variable pad1                    equal 5e3
variable minx                    equal -10e3-${pad1}
variable maxx                    equal 130e3+${pad1}
variable miny                    equal -10e3-${pad1}
variable maxy                    equal 400e3+${pad1}
variable minz                    equal -10e3-${pad1}
variable maxz                    equal 10e3+${pad1}

# Derived Properties & Parameters
variable true_max_diameter       equal ${true_mean_diameter}*(1+${poly}) # [m] max particle diameter
variable true_min_diameter       equal ${true_mean_diameter}*(1-${poly}) # [m] min particle diameter
variable bond_skin_thickness     equal ${bs_multiplier}*${true_max_diameter}    # [m] 0.5% of the max diameter; will subtract this quantity first when doing the packing fix
variable max_diameter            equal ${true_max_diameter}+${bond_skin_thickness}       # [m] max particle diameter for packing
variable min_diameter            equal ${true_min_diameter}+${bond_skin_thickness}       # [m] min particles diameter for packing; added 0.0001 for first step in shrinking
variable mean_diameter           equal (${min_diameter}+${max_diameter})/2       # [m] mean particle diameter for packing; added 0.0001 for first step in shrinking
variable max_radius              equal ${max_diameter}/2 # particle max radius
variable shear_modulus           equal ${elastic_modulus}/(2.0*(1.0+${poissons_ratio})) # assume isotropy

# Particle insertion
variable pad2                    equal 2e3
variable ir1_xi                  equal 40e3+${pad2}
variable ir1_xf                  equal 80e3-${pad2}
variable ir1_yi                  equal 0+${pad2}
variable ir1_yf                  equal 240e3-${pad2}

variable ir_zi                  equal -4.5e3
variable ir_zf                  equal -3.0e3

# Parameters for collapse
variable coeff                  atom 1*PI*(r^2)*${rho_i}
variable dragx                  atom v_coeff*sqrt((vx)^2+(vy)^2)*(-1*vx)
variable dragy                  atom v_coeff*sqrt((vx)^2+(vy)^2)*(-1*vy)
#variable dragz                  atom v_coeff*sqrt((vx)^2+(vy)^2+(vz)^2)*(-1*vz)

# Numerics & output
variable dt                      equal 0.001

### ----------------------------------- build simulation ----------------------------------- ###

# Preliminaries
units si
atom_style hybrid granular bond/gran n_bondtypes 1 bonds_per_atom 6
atom_modify map array sort 0 0
newton off
hard_particles yes
processors * * *
dimension 2

# Domain
boundary m m p
region domain block ${minx} ${maxx} ${miny} ${maxy} ${minz} ${maxz} units box
create_box 2 domain

# import the insertion region
region ins_reg0 block 41e3 51e3 70e3 100e3 ${ir_zi} ${ir_zf} units box

communicate single vel yes              # ghost particles are given position and velocity information
neighbor 1000 bin                        # skin distance to specify bin size for neighbor list generation
neigh_modify delay 0                    # don't delay the generation of neighbor lists

# Bond style
bond_style gran                                        # linear parallel bond

# Contact style
pair_style gran model hertz tangential history                           # Hertz-Mindlin
pair_coeff * *                                                           # contact coeffs from material props not force field

# Contact law
fix m1 all property/global youngsModulus peratomtype ${elastic_modulus} ${elastic_modulus} # set the elastic modulus
fix m2 all property/global poissonsRatio peratomtype ${poissons_ratio} ${poissons_ratio}  # set Poisson's ratio
fix m3 all property/global coefficientRestitution peratomtypepair 2 ${coeff_rest} ${coeff_rest} ${coeff_rest} ${coeff_rest}
fix m4 all property/global coefficientFriction peratomtypepair 2 ${mu} ${wall_friction} ${wall_friction} ${wall_friction}     # set friction coefficient to atom type 1

# Set bond coefficients for a simple bond (no holes) with properties below; see Notion for more details
bond_coeff 1 1 0 ${elastic_modulus} ${shear_modulus} ${bond_damp_type} ${bond_damp_val} 1 ${normal_strength} ${shear_strength}

# Timestep & insertion
lattice hex ${lattice_spacing}
create_atoms 1 region ins_reg0
set type 1 diameter ${true_mean_diameter} density ${rho_i}
timestep ${dt}
run 1

# # Insert fjord & some walls
fix mesh_fjord all mesh/surface/planar file meshes/2d_fjord.stl type 2 scale 1000
fix meshwalls all wall/gran model hertz tangential history mesh n_meshes 1 meshes mesh_fjord

fix int all nve/sphere
fix 2d_only all enforce2d
fix gravi all gravity 9.81 vector -2 -0.1 0
fix fdrag all addforce v_dragx v_dragy 0
set atom 1 vx -2 vy 1 vz 0
set atom 2 diameter 2100

# Dump setup

thermo 5000000                                             # set output frequency for output for screen
thermo_style custom step numbonds atoms time dt                 # custom pringting to screen
thermo_modify lost warn norm no                       # ignore lost atoms and do not normalize output

dump fjord_dump all mesh/stl 1 post/dump*.stl
run 1
undump fjord_dump

dump dmp all custom 10000 post/dump*.liggghts id x y z radius vx vy vz
dump_modify dmp pad 10 sort id first yes

run 300000

write_data data/2d_test.data
